t := 1000 kg
# mathcad.lic.eee.intern
M := [3*t, 0, 0; 0, 2*t, 0; 0, 0, 8*t] = [3000, 0, 0; 0, 2000, 0; 0, 0, 8000] kg
k_3 := 2*12*1.5*10^6 N*m^2/(3.75 m)^3 = 682667 N/m
k_2 := k_3 = 682667 kg/s^2
k_1 := 2*12*1.5*10^6 N*m^2/(4.5 m)^3 = 395062 N/m
K := [k_1 + k_2, -k_2, 0; -k_2, k_2 + k_3, -k_3; 0, -k_3, k_3] = [1077.73, -682.667, 0; -682.667, 1365.33, -682.667; 0, -682.667, 682.667] kN/m
A := det(-λ*M + K) == 0  # error: Diese Variable ist nicht definiert. Prüfen Sie, ob die Beschriftung richtig festgelegt ist.
A expand → 32768000000*λ^2*kN*kg^2/m + (1004515670.74*kN^3/m^3 - 14567870683.1*λ*kN^2*kg/m^2) + (17243654321*λ^2*kN*kg^2/m - (502257835.369*kN^3/m^3 + 1471458502.06*λ*kN^2*kg/m^2)) + (4096000000*λ^2*kN*kg^2/m - 318145725.63*kN^3/m^3) - 1.0*48000000000.0*λ^3*kg^3 + 5126371555.56*λ*kN^2*kg/m^2 == 0.0
[λ_1; λ_2; λ_3] := A solve, λ → [
    (m^2*kg^2*((0.0555555555556*m^3*kg^3*(-0.0419828879937*kN^6/(m^6*kg^6))^0.5 + 0.012254506845*kN^3)/(m^3*kg^3))^0.666666666667 + 0.375747599451*kN*m*kg*((0.0555555555556*m^3*kg^3*(-0.0419828879937*kN^6/(m^6*kg^6))^0.5 + 0.012254506845*kN^3)/(m^3*kg^3))^0.333333333333 + 0.0654018305099*kN^2)/(m^2*kg^2*((0.0555555555556*m^3*kg^3*(-0.0419828879937*kN^6/(m^6*kg^6))^0.5 + 0.012254506845*kN^3)/(m^3*kg^3))^0.333333333333);
    ((0.866025403784*m^2*kg^2*1.0i - 0.5*m^2*kg^2)*((0.0555555555556*m^3*kg^3*(-0.0419828879937*kN^6/(m^6*kg^6))^0.5 + 0.012254506845*kN^3)/(m^3*kg^3))^0.666666666667 + (0.375747599451*kN*m*kg*((0.0555555555556*m^3*kg^3*(-0.0419828879937*kN^6/(m^6*kg^6))^0.5 + 0.012254506845*kN^3)/(m^3*kg^3))^0.333333333333 - (0.0566396466756*kN^2*1.0i + 0.0327009152549*kN^2)))/(m^2*kg^2*((0.0555555555556*m^3*kg^3*(-0.0419828879937*kN^6/(m^6*kg^6))^0.5 + 0.012254506845*kN^3)/(m^3*kg^3))^0.333333333333);
    ((-0.866025403784*m^2*kg^2*1.0i - 0.5*m^2*kg^2)*((0.0555555555556*m^3*kg^3*(-0.0419828879937*kN^6/(m^6*kg^6))^0.5 + 0.012254506845*kN^3)/(m^3*kg^3))^0.666666666667 + 0.375747599451*kN*m*kg*((0.0555555555556*m^3*kg^3*(-0.0419828879937*kN^6/(m^6*kg^6))^0.5 + 0.012254506845*kN^3)/(m^3*kg^3))^0.333333333333 + (0.0566396466756*kN^2*1.0i - 0.0327009152549*kN^2))/(m^2*kg^2*((0.0555555555556*m^3*kg^3*(-0.0419828879937*kN^6/(m^6*kg^6))^0.5 + 0.012254506845*kN^3)/(m^3*kg^3))^0.333333333333)
]
λ_1 = 871.384 1/s^2
λ_1 := Re(λ_1) = 871.384 1/s^2
λ_2 = (18.5488 - 2.10767e-13i) 1/s^2
λ_2 := Re(λ_2) = 18.5488 1/s^2
λ := [λ_1; λ_2; λ_3]
λ_3 = 237.31 1/s^2
λ_3 := Re(λ_3) = 237.31 1/s^2
ω_1 := sqrt(λ_2) = 4.30683 1/s
λ = [871.384; 18.5488; 237.31] 1/s^2
ω_2 := sqrt(λ_3) = 15.4049 1/s
ω_3 := sqrt(λ_1) = 29.5192 1/s
ω := [ω_1; ω_2; ω_3] = [4.30683; 15.4049; 29.5192] 1/s
Test := eigenvals(-[a, 0, 0; 0, b, 0; 0, 0, c]*M + K)  # error: Diese Variable ist nicht definiert. Prüfen Sie, ob die Beschriftung richtig festgelegt ist.
B := K - ω_1^2*M = [1022082, -682667, 0; -682667, 1328236, -682667; 0, -682667, 534277] kg/s^2
Φ_11 := 1
Φ_21 := -B(0, 0)/B(0, 1)*Φ_11 = 1.49719
Φ_31 := -B(1, 2)/B(2, 2)*Φ_21 = 1.91302
Φ_1 := [Φ_11; Φ_21; Φ_31] = [1; 1.49719; 1.91302]
max(Φ_1) = 1.91302
Φ_1 := Φ_1/max([|Φ_11|; |Φ_21|; |Φ_31|]) = [0.522733; 0.782632; 1]
B*Φ_1 = [0; 2.32831e-10; -1.16415e-10] kg/s^2
B := K - ω_2^2*M = [365797, -682667, 0; -682667, 890713, -682667; 0, -682667, -1215816] kg/s^2
Φ_12 := 1
Φ_22 := -B(0, 0)/B(0, 1)*Φ_12 = 0.535836
Φ_32 := -B(1, 2)/B(2, 2)*Φ_22 = -0.300866
Φ_2 := [Φ_12; Φ_22; Φ_32] = [1; 0.535836; -0.300866]
max(Φ_2) = 1
Φ_2 := Φ_2/max([|Φ_12|; |Φ_22|; |Φ_32|]) = [1; 0.535836; -0.300866]
B*Φ_2 = [0; -3.20142e-10; 0] kg/s^2
B := K - ω_3^2*M = [-1536423, -682667, 0; -682667, -377434, -682667; 0, -682667, -6288403] kg/s^2
Φ_13 := 1
Φ_23 := -B(0, 0)/B(0, 1)*Φ_13 = -2.25062
Φ_33 := -B(1, 2)/B(2, 2)*Φ_23 = 0.244326
Φ_3 := [Φ_13; Φ_23; Φ_33] = [1; -2.25062; 0.244326]
max(Φ_3) = 1
Φ_3 := Φ_3/max([|Φ_13|; |Φ_23|; |Φ_33|]) = [0.444322; -1; 0.10856]
B*Φ_3 = [-1.16415e-10; -1.01863e-9; 0] kg/s^2
Φ := augment(Φ_1, Φ_2, Φ_3) = [0.522733, 1, 0.444322; 0.782632, 0.535836, -1; 1, -0.300866, 0.10856]
M_s := transpose(Φ)*M*Φ = [10044.8, 0, 0; 0, 4298.4, 0; 0, 0, 2686.55] kg
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K_s := transpose(Φ)*K*Φ = [186318, 0, 0; 0, 1020055, 0; 0, 0, 2341014] N/m
T := 2*π/ω = [1.45889; 0.40787; 0.212851] s
S_1 := 1.4 m/s^2
S_2 := 4.225 m/s^2
S_3 := 4.225 m/s^2
Γ := M_s^-1*transpose(Φ)*M*identity(3)*[1; 1; 1] = [1.10838; 0.387294; 0.0749823]
ω = [4.30683; 15.4049; 29.5192] 1/s
q_1_max := Γ(0)*1/ω_1^2*S_1 = 0.0836572 m
q_2_max := Γ(1)*1/ω_2^2*S_2 = 0.00689527 m
q_3_max := Γ(2)*1/ω_3^2*S_3 = 0.00036356 m
((Φ_1*q_1_max)^2 + (Φ_2*q_2_max)^2 + (Φ_2*q_2_max)^2)^(1/2) = [0.0448044; 0.0656809; 0.0837086] m
u_1_max := q_1_max*Φ_1 = [0.0437304; 0.0654727; 0.0836572] m
s_1 := Γ(0)*M*Φ_1 = [1738.17; 1734.91; 8867.07] kg
F_1_max := s_1*S_1 = [2433.43; 2428.88; 12413.9] N
V_1 := [F_1_max(2) + F_1_max(1) + F_1_max(0); F_1_max(2) + F_1_max(1); F_1_max(2)] = [17.2762; 14.8428; 12.4139] kN
u_2_max := q_2_max*Φ_2 = [0.00689527; 0.00369473; -0.00207455] m
s_2 := Γ(1)*M*Φ_2 = [1161.88; 415.053; -932.189] kg
F_2_max := s_2*S_2 = [4908.96; 1753.6; -3938.5] N
V_2 := [F_2_max(2) + F_2_max(1) + F_2_max(0); F_2_max(2) + F_2_max(1); F_2_max(2)] = [2.72406; -2.1849; -3.9385] kN
u_3_max := q_3_max*Φ_3 = [0.000161538; -0.00036356; 3.9468e-5] m
s_3 := Γ(2)*M*Φ_3 = [99.9489; -149.965; 65.1204] kg
F_3_max := s_3*S_3 = [422.284; -633.601; 275.134] N
V_3 := [F_3_max(2) + F_3_max(1) + F_3_max(0); F_3_max(2) + F_3_max(1); F_3_max(2)] = [0.0638174; -0.358467; 0.275134] kN
(V_1^2 + V_2^2 + V_3^2)^(1/2) = [17.4898; 15.007; 13.0266] kN
(F_1_max^2 + F_2_max^2 + F_3_max^2)^(1/2) = [5.49525; 3.06202; 13.0266] kN
