# Beispiel C
x := 8
y := 1
t := 1000 kg
m1 := 2*t + y/10*t
m1 = 2100 kg
h1 := 3 m + (y/100) m + (x/10) m = 3.81 m
m2 := 4*t + x/10*t
m2 = 4800 kg
h2 := 3 m
M := [m1, 0; 0, m2] = [2100, 0; 0, 4800] kg
k_1 := 1.2*10^6 N*m^2/h1^3*2 = 43394.7 N/m
k_2 := 1.2*10^6 N*m^2/h2^3 + 1.0*10^6 N*m^2/h2^3 = 81481.5 N/m
K := [k_1 + k_2, -k_2; -k_2, k_2] = [124876, -81481.5; -81481.5, 81481.5] N/m
A := det(-λ*M + K) == 0  # error: Diese Variable ist nicht definiert. Prüfen Sie, ob die Beschriftung richtig festgelegt ist.
[λ_1; λ_2] := A solve, λ → [
    (0.992063492063*10^-7*(1.12782475741e17*N^2*m^2*kg^2)^0.5 + 38.2200695469*N*m*kg)/(m^2*kg^2);
    (-(0.992063492063*10^-7)*(1.12782475741e17*N^2*m^2*kg^2)^0.5 + 38.2200695469*N*m*kg)/(m^2*kg^2)
]
λ_1 = 71.5366 1/s^2
ω_2 := sqrt(λ_1) = 8.45793 1/s
λ_2 = 4.9035 1/s^2
ω_1 := sqrt(λ_2) = 2.21438 1/s
ω := [ω_1; ω_2] = [2.21438; 8.45793] 1/s
B := K - ω_1^2*M = [114579, -81481.5; -81481.5, 57944.7] kg/s^2
Φ_11 := 1
Φ_21 := -B(0, 0)/B(0, 1)*Φ_11 = 1.40619
Φ_1 := [Φ_11; Φ_21] = [1; 1.40619]
max(Φ_1) = 1.40619
Φ_1 := Φ_1/max([|Φ_11|; |Φ_21|]) = [0.711139; 1]
B*Φ_1 = [0; 7.27596e-12] kg/s^2
B := K - ω_2^2*M = [-25350.8, -81481.5; -81481.5, -261894] kg/s^2
Φ_12 := 1
Φ_22 := -B(0, 0)/B(0, 1)*Φ_12 = -0.311123
Φ_2 := [Φ_12; Φ_22] = [1; -0.311123]
max(Φ_1) = 1
Φ_2 := Φ_2/max([|Φ_12|; |Φ_22|]) = [1; -0.311123]
B*Φ_2 = [0; -4.36557e-11] kg/s^2
Φ := augment(Φ_1, Φ_2) = [0.711139, 1; 1, -0.311123]
M_s := transpose(Φ)*M*Φ = [5862.01, 0; 0, 2564.63] kg
K_s := transpose(Φ)*K*Φ = [28744.4, 0; 0, 183465] N/m
T := 2*π/ω = [2.83744; 0.742875] s
S_1 := 0.45 m/s^2
S_2 := 1.6 m/s^2
Γ := M_s^-1*transpose(Φ)*M*identity(2)*[1; 1] = [1.07359; 0.236528]
ω = [2.21438; 8.45793] 1/s
q_1_max := Γ(0)*1/ω_1^2*S_1 = 0.0985246 m
q_2_max := Γ(1)*1/ω_2^2*S_2 = 0.00529023 m
((Φ_1*q_1_max)^2 + (Φ_2*q_2_max)^2)^(1/2) = [0.0702641; 0.0985383] m
u_1_max := q_1_max*Φ_1 = [0.0700647; 0.0985246] m
s_1 := Γ(0)*M*Φ_1 = [1603.29; 5153.23] kg
F_1_max := s_1*S_1 = [0.721481; 2.31895] kN
V_1 := [F_1_max(1) + F_1_max(0); F_1_max(1)] = [3.04043; 2.31895] kN
u_2_max := q_2_max*Φ_2 = [0.00529023; -0.00164591] m
s_2 := Γ(1)*M*Φ_2 = [496.709; -353.23] kg
F_2_max := s_2*S_2 = [794.735; -565.167] N
V_2 := [F_2_max(1) + F_2_max(0); F_2_max(1)] = [0.229568; -0.565167] kN
(V_1^2 + V_2^2)^(1/2) = [3.04909; 2.38683] kN
(F_1_max^2 + F_2_max^2)^(1/2) = [1.07338; 2.38683] kN
