t := 1000 kg
# mathcad.lic.eee.intern
M := [5*t, 0, 0; 0, 4*t, 0; 0, 0, 4*t] = [5000, 0, 0; 0, 4000, 0; 0, 0, 4000] kg
k_2 := 2*12*1.15*10^6 N*m^2/(3.5 m)^3 = 643732 N/m
k_3 := k_2 = 643732 kg/s^2
k_1 := 2*12*1.15*10^6 N*m^2/(4.5 m)^3 = 302881 N/m
K := [k_1 + k_2, -k_2, 0; -k_2, k_2 + k_3, -k_3; 0, -k_3, k_3] = [946.612, -643.732, 0; -643.732, 1287.46, -643.732; 0, -643.732, 643.732] kN/m
A := det(-λ*M + K) == 0  # error: Diese Variable ist nicht definiert. Prüfen Sie, ob die Beschriftung richtig festgelegt ist.
A expand → 25749271137*λ^2*kN*kg^2/m + (784534596.195*kN^3/m^3 - 9018822085.24*λ*kN^2*kg/m^2) + (15145798989.8*λ^2*kN*kg^2/m - (392267298.097*kN^3/m^3 + 2437458029.84*λ*kN^2*kg/m^2)) + (12874635568.5*λ^2*kN*kg^2/m - 266756399.546*kN^3/m^3) - 1.0*80000000000.0*λ^3*kg^3 + 3729515423*λ*kN^2*kg/m^2 == 0.0
[λ_1; λ_2; λ_3] := A solve, λ → [
    (m^2*kg^2*((0.0555555555556*m^3*kg^3*(-0.0014145511678*kN^6/(m^6*kg^6))^0.5 + 0.00121053209925*kN^3)/(m^3*kg^3))^0.666666666667 + 0.224040440397*kN*m*kg*((0.0555555555556*m^3*kg^3*(-0.0014145511678*kN^6/(m^6*kg^6))^0.5 + 0.00121053209925*kN^3)/(m^3*kg^3))^0.333333333333 + 0.0179992660497*kN^2)/(m^2*kg^2*((0.0555555555556*m^3*kg^3*(-0.0014145511678*kN^6/(m^6*kg^6))^0.5 + 0.00121053209925*kN^3)/(m^3*kg^3))^0.333333333333);
    ((0.866025403784*m^2*kg^2*1.0i - 0.5*m^2*kg^2)*((0.0555555555556*m^3*kg^3*(-0.0014145511678*kN^6/(m^6*kg^6))^0.5 + 0.00121053209925*kN^3)/(m^3*kg^3))^0.666666666667 + (0.224040440397*kN*m*kg*((0.0555555555556*m^3*kg^3*(-0.0014145511678*kN^6/(m^6*kg^6))^0.5 + 0.00121053209925*kN^3)/(m^3*kg^3))^0.333333333333 - (0.0155878216485*kN^2*1.0i + 0.00899963302484*kN^2)))/(m^2*kg^2*((0.0555555555556*m^3*kg^3*(-0.0014145511678*kN^6/(m^6*kg^6))^0.5 + 0.00121053209925*kN^3)/(m^3*kg^3))^0.333333333333);
    ((-0.866025403784*m^2*kg^2*1.0i - 0.5*m^2*kg^2)*((0.0555555555556*m^3*kg^3*(-0.0014145511678*kN^6/(m^6*kg^6))^0.5 + 0.00121053209925*kN^3)/(m^3*kg^3))^0.666666666667 + 0.224040440397*kN*m*kg*((0.0555555555556*m^3*kg^3*(-0.0014145511678*kN^6/(m^6*kg^6))^0.5 + 0.00121053209925*kN^3)/(m^3*kg^3))^0.333333333333 + (0.0155878216485*kN^2*1.0i - 0.00899963302484*kN^2))/(m^2*kg^2*((0.0555555555556*m^3*kg^3*(-0.0014145511678*kN^6/(m^6*kg^6))^0.5 + 0.00121053209925*kN^3)/(m^3*kg^3))^0.333333333333)
]
λ_1 = 476.227 1/s^2
λ_1 := Re(λ_1) = 476.227 1/s^2
λ_2 = 18.5794 1/s^2
λ_2 := Re(λ_2) = 18.5794 1/s^2
λ := [λ_1; λ_2; λ_3]
λ_3 = 177.315 1/s^2
λ_3 := Re(λ_3) = 177.315 1/s^2
ω_1 := sqrt(λ_2) = 4.31039 1/s
λ = [476.227; 18.5794; 177.315] 1/s^2
ω_2 := sqrt(λ_3) = 13.316 1/s
ω_3 := sqrt(λ_1) = 21.8226 1/s
ω := [ω_1; ω_2; ω_3] = [4.31039; 13.316; 21.8226] 1/s
Test := eigenvals(-[a, 0, 0; 0, b, 0; 0, 0, c]*M + K)  # error: Diese Variable ist nicht definiert. Prüfen Sie, ob die Beschriftung richtig festgelegt ist.
B := K - ω_1^2*M = [853715, -643732, 0; -643732, 1213146, -643732; 0, -643732, 569414] kg/s^2
Φ_11 := 1
Φ_21 := -B(0, 0)/B(0, 1)*Φ_11 = 1.3262
Φ_31 := -B(1, 2)/B(2, 2)*Φ_21 = 1.49929
Φ_1 := [Φ_11; Φ_21; Φ_31] = [1; 1.3262; 1.49929]
max(Φ_1) = 1.49929
Φ_1 := Φ_1/max([|Φ_11|; |Φ_21|; |Φ_31|]) = [0.666984; 0.884552; 1]
B*Φ_1 = [0; 0; 0] kg/s^2
B := K - ω_2^2*M = [60038.2, -643732, 0; -643732, 578204, -643732; 0, -643732, -65527.6] kg/s^2
Φ_12 := 1
Φ_22 := -B(0, 0)/B(0, 1)*Φ_12 = 0.0932659
Φ_32 := -B(1, 2)/B(2, 2)*Φ_22 = -0.916228
Φ_2 := [Φ_12; Φ_22; Φ_32] = [1; 0.0932659; -0.916228]
max(Φ_2) = 1
Φ_2 := Φ_2/max([|Φ_12|; |Φ_22|; |Φ_32|]) = [1; 0.0932659; -0.916228]
B*Φ_2 = [0; 2.09548e-9; 7.27596e-12] kg/s^2
B := K - ω_3^2*M = [-1434523, -643732, 0; -643732, -617445, -643732; 0, -643732, -1261176] kg/s^2
Φ_13 := 1
Φ_23 := -B(0, 0)/B(0, 1)*Φ_13 = -2.22845
Φ_33 := -B(1, 2)/B(2, 2)*Φ_23 = 1.13745
Φ_3 := [Φ_13; Φ_23; Φ_33] = [1; -2.22845; 1.13745]
max(Φ_3) = 1.13745
Φ_3 := Φ_3/max([|Φ_13|; |Φ_23|; |Φ_33|]) = [0.448743; -1; 0.510422]
B*Φ_3 = [0; -1.16415e-10; 0] kg/s^2
Φ := augment(Φ_1, Φ_2, Φ_3) = [0.666984, 1, 0.448743; 0.884552, 0.0932659, -1; 1, -0.916228, 0.510422]
M_s := transpose(Φ)*M*Φ = [9354.06, 0, 0; 0, 8392.69, 0; 0, 0, 6048.97] kg
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K_s := transpose(Φ)*K*Φ = [173793, 0, 0; 0, 1488148, 0; 0, 0, 2880684] N/m
T := 2*π/ω = [1.45769; 0.471854; 0.287921] s
S_1 := 1.4 m/s^2
S_2 := 4.225 m/s^2
S_3 := 4.225 m/s^2
Γ := M_s^-1*transpose(Φ)*M*identity(3)*[1; 1; 1] = [1.1624; 0.203529; 0.0471817]
ω = [4.31039; 13.316; 21.8226] 1/s
q_1_max := Γ(0)*1/ω_1^2*S_1 = 0.0875891 m
q_2_max := Γ(1)*1/ω_2^2*S_2 = 0.00484961 m
q_3_max := Γ(2)*1/ω_3^2*S_3 = 0.000418587 m
((Φ_1*q_1_max)^2 + (Φ_2*q_2_max)^2 + (Φ_2*q_2_max)^2)^(1/2) = [0.0588217; 0.0774797; 0.0878142] m
u_1_max := q_1_max*Φ_1 = [0.0584205; 0.0774771; 0.0875891] m
s_1 := Γ(0)*M*Φ_1 = [3876.5; 4112.8; 4649.58] kg
F_1_max := s_1*S_1 = [5427.09; 5757.92; 6509.42] N
V_1 := [F_1_max(2) + F_1_max(1) + F_1_max(0); F_1_max(2) + F_1_max(1); F_1_max(2)] = [17.6944; 12.2673; 6.50942] kN
u_2_max := q_2_max*Φ_2 = [0.00484961; 0.000452303; -0.00444335] m
s_2 := Γ(1)*M*Φ_2 = [1017.64; 75.9291; -745.914] kg
F_2_max := s_2*S_2 = [4299.54; 320.8; -3151.49] N
V_2 := [F_2_max(2) + F_2_max(1) + F_2_max(0); F_2_max(2) + F_2_max(1); F_2_max(2)] = [1.46885; -2.83069; -3.15149] kN
u_3_max := q_3_max*Φ_3 = [0.000187838; -0.000418587; 0.000213656] m
s_3 := Γ(2)*M*Φ_3 = [105.862; -188.727; 96.3302] kg
F_3_max := s_3*S_3 = [447.268; -797.37; 406.995] N
V_3 := [F_3_max(2) + F_3_max(1) + F_3_max(0); F_3_max(2) + F_3_max(1); F_3_max(2)] = [0.0568925; -0.390375; 0.406995] kN
(V_1^2 + V_2^2 + V_3^2)^(1/2) = [17.7554; 12.5957; 7.24362] kN
(F_1_max^2 + F_2_max^2 + F_3_max^2)^(1/2) = [6.93826; 5.82171; 7.24362] kN
