t := 1000 kg
# mathcad.lic.eee.intern
M := [3*t, 0, 0; 0, 2*t, 0; 0, 0, 8*t] = [3000, 0, 0; 0, 2000, 0; 0, 0, 8000] kg
k_2 := 2*1.5*10^6 N*m^2/(3.5 m)^3 = 69970.8 N/m
k_3 := k_2 = 69970.8 kg/s^2
k_1 := 2*1.5*10^6 N*m^2/(4.5 m)^3 = 32921.8 N/m
K := [k_1 + k_2, -k_2, 0; -k_2, k_2 + k_3, -k_3; 0, -k_3, k_3] = [102.893, -69.9708, 0; -69.9708, 139.942, -69.9708; 0, -69.9708, 69.9708] kN/m
A := det(-λ*M + K) == 0  # error: Diese Variable ist nicht definiert. Prüfen Sie, ob die Beschriftung richtig festgelegt ist.
A expand → 3358600583.09*λ^2*kN*kg^2/m + (1007508.26543*kN^3/m^3 - 144567293.652*λ*kN^2*kg/m^2) + (1646282498.89*λ^2*kN*kg^2/m - (503754.132717*kN^3/m^3 + 14398972.2935*λ*kN^2*kg/m^2)) + (419825072.886*λ^2*kN*kg^2/m - 342571.607044*kN^3/m^3) - 1.0*48000000000.0*λ^3*kg^3 + 53855111.3907*λ*kN^2*kg/m^2 == 0.0
[λ_1; λ_2; λ_3] := A solve, λ → [
    (m^2*kg^2*((0.0555555555556*m^3*kg^3*(-(0.435288880735*10^-7)*kN^6/(m^6*kg^6))^0.5 + 1.38936346889e-5*kN^3)/(m^3*kg^3))^0.666666666667 + 0.0376715844088*kN*m*kg*((0.0555555555556*m^3*kg^3*(-(0.435288880735*10^-7)*kN^6/(m^6*kg^6))^0.5 + 1.38936346889e-5*kN^3)/(m^3*kg^3))^0.333333333333 + 0.000689209698572*kN^2)/(m^2*kg^2*((0.0555555555556*m^3*kg^3*(-(0.435288880735*10^-7)*kN^6/(m^6*kg^6))^0.5 + 1.38936346889e-5*kN^3)/(m^3*kg^3))^0.333333333333);
    ((0.866025403784*m^2*kg^2*1.0i - 0.5*m^2*kg^2)*((0.0555555555556*m^3*kg^3*(-(0.435288880735*10^-7)*kN^6/(m^6*kg^6))^0.5 + 1.38936346889e-5*kN^3)/(m^3*kg^3))^0.666666666667 + (0.0376715844088*kN*m*kg*((0.0555555555556*m^3*kg^3*(-(0.435288880735*10^-7)*kN^6/(m^6*kg^6))^0.5 + 1.38936346889e-5*kN^3)/(m^3*kg^3))^0.333333333333 - (0.000596873107498*kN^2*1.0i + 0.000344604849286*kN^2)))/(m^2*kg^2*((0.0555555555556*m^3*kg^3*(-(0.435288880735*10^-7)*kN^6/(m^6*kg^6))^0.5 + 1.38936346889e-5*kN^3)/(m^3*kg^3))^0.333333333333);
    ((-0.866025403784*m^2*kg^2*1.0i - 0.5*m^2*kg^2)*((0.0555555555556*m^3*kg^3*(-(0.435288880735*10^-7)*kN^6/(m^6*kg^6))^0.5 + 1.38936346889e-5*kN^3)/(m^3*kg^3))^0.666666666667 + 0.0376715844088*kN*m*kg*((0.0555555555556*m^3*kg^3*(-(0.435288880735*10^-7)*kN^6/(m^6*kg^6))^0.5 + 1.38936346889e-5*kN^3)/(m^3*kg^3))^0.333333333333 + (0.000596873107498*kN^2*1.0i - 0.000344604849286*kN^2))/(m^2*kg^2*((0.0555555555556*m^3*kg^3*(-(0.435288880735*10^-7)*kN^6/(m^6*kg^6))^0.5 + 1.38936346889e-5*kN^3)/(m^3*kg^3))^0.333333333333)
]
λ_1 = 88.7734 1/s^2
λ_1 := Re(λ_1) = 88.7734 1/s^2
λ_2 = 1.67632 1/s^2
λ_2 := Re(λ_2) = 1.67632 1/s^2
λ := [λ_1; λ_2; λ_3]
λ_3 = 22.5651 1/s^2
λ_3 := Re(λ_3) = 22.5651 1/s^2
ω_1 := sqrt(λ_2) = 1.29473 1/s
λ = [88.7734; 1.67632; 22.5651] 1/s^2
ω_2 := sqrt(λ_3) = 4.75027 1/s
ω_3 := sqrt(λ_1) = 9.42196 1/s
ω := [ω_1; ω_2; ω_3] = [1.29473; 4.75027; 9.42196] 1/s
Test := eigenvals(-[a, 0, 0; 0, b, 0; 0, 0, c]*M + K)  # error: Diese Variable ist nicht definiert. Prüfen Sie, ob die Beschriftung richtig festgelegt ist.
B := K - ω_1^2*M = [97863.7, -69970.8, 0; -69970.8, 136589, -69970.8; 0, -69970.8, 56560.3] kg/s^2
Φ_11 := 1
Φ_21 := -B(0, 0)/B(0, 1)*Φ_11 = 1.39864
Φ_31 := -B(1, 2)/B(2, 2)*Φ_21 = 1.73026
Φ_1 := [Φ_11; Φ_21; Φ_31] = [1; 1.39864; 1.73026]
max(Φ_1) = 1.73026
Φ_1 := Φ_1/max([|Φ_11|; |Φ_21|; |Φ_31|]) = [0.577949; 0.808341; 1]
B*Φ_1 = [0; -5.82077e-11; 0] kg/s^2
B := K - ω_2^2*M = [35197.5, -69970.8, 0; -69970.8, 94811.6, -69970.8; 0, -69970.8, -110550] kg/s^2
Φ_12 := 1
Φ_22 := -B(0, 0)/B(0, 1)*Φ_12 = 0.50303
Φ_32 := -B(1, 2)/B(2, 2)*Φ_22 = -0.318386
Φ_2 := [Φ_12; Φ_22; Φ_32] = [1; 0.50303; -0.318386]
max(Φ_2) = 1
Φ_2 := Φ_2/max([|Φ_12|; |Φ_22|; |Φ_32|]) = [1; 0.50303; -0.318386]
B*Φ_2 = [0; 2.18279e-11; 0] kg/s^2
B := K - ω_3^2*M = [-163427, -69970.8, 0; -69970.8, -37605, -69970.8; 0, -69970.8, -640216] kg/s^2
Φ_13 := 1
Φ_23 := -B(0, 0)/B(0, 1)*Φ_13 = -2.33565
Φ_33 := -B(1, 2)/B(2, 2)*Φ_23 = 0.255269
Φ_3 := [Φ_13; Φ_23; Φ_33] = [1; -2.33565; 0.255269]
max(Φ_3) = 1
Φ_3 := Φ_3/max([|Φ_13|; |Φ_23|; |Φ_33|]) = [0.428146; -1; 0.109293]
B*Φ_3 = [0; 7.27596e-12; 0] kg/s^2
Φ := augment(Φ_1, Φ_2, Φ_3) = [0.577949, 1, 0.428146; 0.808341, 0.50303, -1; 1, -0.318386, 0.109293]
M_s := transpose(Φ)*M*Φ = [10308.9, 0, 0; 0, 4317.04, 0; 0, 0, 2645.49] kg
K_s := transpose(Φ)*K*Φ = [17281, 0, 0; 0, 97414.2, 0; 0, 0, 234849] N/m
T := 2*π/ω = [4.8529; 1.3227; 0.666866] s
S_1 := 0.08 m/s^2
S_2 := 0.58 m/s^2
S_3 := 1 m/s^2
Γ := M_s^-1*transpose(Φ)*M*identity(3)*[1; 1; 1] = [1.10104; 0.337957; 0.0600188]
ω = [1.29473; 4.75027; 9.42196] 1/s
q_1_max := Γ(0)*1/ω_1^2*S_1 = 0.0525456 m
q_2_max := Γ(1)*1/ω_2^2*S_2 = 0.00868666 m
q_3_max := Γ(2)*1/ω_3^2*S_3 = 0.000676091 m
((Φ_1*q_1_max)^2 + (Φ_2*q_2_max)^2 + (Φ_2*q_2_max)^2)^(1/2) = [0.0327593; 0.0429219; 0.0526909] m
u_1_max := q_1_max*Φ_1 = [0.0303687; 0.0424747; 0.0525456] m
s_1 := Γ(0)*M*Φ_1 = [2.10435; 1.96215; 9.70952] ton
F_1_max := s_1*S_1 = [152.723; 142.403; 704.666] N
V_1 := [F_1_max(2) + F_1_max(1) + F_1_max(0); F_1_max(2) + F_1_max(1); F_1_max(2)] = [0.999792; 0.847069; 0.704666] kN
u_2_max := q_2_max*Φ_2 = [0.00868666; 0.00436966; -0.00276571] m
s_2 := Γ(1)*M*Φ_2 = [1.1176; 0.374792; -0.948876] ton
F_2_max := s_2*S_2 = [588.045; 197.203; -499.268] N
V_2 := [F_2_max(2) + F_2_max(1) + F_2_max(0); F_2_max(2) + F_2_max(1); F_2_max(2)] = [0.285981; -0.302065; -0.499268] kN
u_3_max := q_3_max*Φ_3 = [0.000289466; -0.000676091; 7.38917e-5] m
s_3 := Γ(2)*M*Φ_3 = [0.0849778; -0.132319; 0.0578459] ton
F_3_max := s_3*S_3 = [77.0905; -120.038; 52.4769] N
V_3 := [F_3_max(2) + F_3_max(1) + F_3_max(0); F_3_max(2) + F_3_max(1); F_3_max(2)] = [0.00952973; -0.0675608; 0.0524769] kN
(V_1^2 + V_2^2 + V_3^2)^0.5 = [1.03993; 0.90185; 0.865203] kN
(F_1_max^2 + F_2_max^2 + F_3_max^2)^0.5 = [0.612425; 0.27125; 0.865203] kN
